// GridLAB-D tariff design model file
#ifexist "config.csv"
#input "config.csv" -f config -t config
#endif


//#ifexist "${WEATHER_STATION}.tmy3"
//#input "${WEATHER_STATION}.tmy3"
//#else
//#weather get "${WEATHER_STATION}.tmy3"
//#input "${WEATHER_STATION}.tmy3"
//#endif

//GridLAB-D modules
module revenue;

//py modules
module tariff_design;
module powerflow;

//Define classes here (inputs and outputs)

object tariff {
	name "tariff";
}

class billing {
	double usage[kWh];
	double total_usage[kWh];
	double billing_hrs;
	double total_power[W];
	double peak_power[W];
}

#for tri_meter in ${FIND class=triplex_meter}
object billing {
	name "bill_${tri_meter}";
	meter "${tri_meter}";
	tariff "tariff";
	billing_hrs "0.0";
	total_charges "0.0";
	usage "0.0";
	total_usage "0.0";
	total_power "0.0";
	peak_power "0.0";
}
#done

#for meter in ${FIND class=meter}
object billing {
	name "bill_${meter}";
	meter "${meter}";
	tariff "tariff";
	billing_hrs "0.0";
	total_charges "0.0";
	usage "0.0";
	total_usage "0.0";
	total_power "0.0";
	peak_power "0.0";
}
#done
